# [area: Daten Kegelrollenlager]
# [component: outputs KegelrollenlagerData]
KegelrollenlagerData = [
    "Kurzzeichen", "d", "D", "B", "Cr", "C0r", "e", "Y", "Y0";
    "INA 32007", 35, 62, 18, 45.5, 57, 0.45, 1.32, 0.73;
    "INA 33207", 35, 72, 28, 86, 105, 0.35, 1.7, 0.93;
    "INA 32308", 40, 90, 33, 120, 146, 0.35, 1.74, 0.96
]
Kurzzeichen_Kegelrollenlager := submatrix(KegelrollenlagerData, 1, rows(KegelrollenlagerData) - 1, 0, 0)
# [area: Daten Kugelrollenlager]
e_R(Θ) :=
    (0.22 - 0.19)/(0.028 - 0.014)*(Θ - 0.014) + 0.19 if 0.014 ≤ Θ < 0.028
    (0.26 - 0.22)/(0.056 - 0.028)*(Θ - 0.028) + 0.22 if 0.028 ≤ Θ < 0.056
    (0.28 - 0.26)/(0.084 - 0.056)*(Θ - 0.056) + 0.26 if 0.056 ≤ Θ < 0.084
    (0.3 - 0.28)/(0.11 - 0.084)*(Θ - 0.084) + 0.28 if 0.084 ≤ Θ < 0.110
    (0.34 - 0.3)/(0.17 - 0.11)*(Θ - 0.11) + 0.3 if 0.11 ≤ Θ < 0.17
    (0.38 - 0.34)/(0.28 - 0.17)*(Θ - 0.17) + 0.34 if 0.17 ≤ Θ < 0.28
    (0.42 - 0.38)/(0.42 - 0.28)*(Θ - 0.28) + 0.38 if 0.28 ≤ Θ < 0.42
    (0.44 - 0.42)/(0.56 - 0.42)*(Θ - 0.42) + 0.42 if 0.42 ≤ Θ ≤ 0.56
    -1000000 otherwise
Y_R(Θ) :=
    (1.99 - 2.3)/(0.028 - 0.014)*(Θ - 0.014) + 2.3 if 0.014 ≤ Θ < 0.028
    (1.71 - 1.99)/(0.056 - 0.028)*(Θ - 0.028) + 1.99 if 0.028 ≤ Θ < 0.056
    (1.55 - 1.71)/(0.084 - 0.056)*(Θ - 0.056) + 1.71 if 0.056 ≤ Θ < 0.084
    (1.45 - 1.55)/(0.11 - 0.084)*(Θ - 0.084) + 1.55 if 0.084 ≤ Θ < 0.110
    (1.31 - 1.45)/(0.17 - 0.11)*(Θ - 0.11) + 1.45 if 0.11 ≤ Θ < 0.17
    (1.15 - 1.31)/(0.28 - 0.17)*(Θ - 0.17) + 1.31 if 0.17 ≤ Θ < 0.28
    (1.04 - 1.15)/(0.42 - 0.28)*(Θ - 0.28) + 1.15 if 0.28 ≤ Θ < 0.42
    (1 - 1.04)/(0.56 - 0.42)*(Θ - 0.42) + 1.04 if 0.42 ≤ Θ ≤ 0.56
    -1000000 otherwise
# 1. Antriebswelle
# [area: 1.1 Antriebswelle-Kennwerte]
# 1.1 Antriebskennwerte
P_an := 30 kW
n_1 := 1480 min^-1
i_ges_theoretisch := 7.8
K_A := 1.5
T_1 := P_an/(2*π*n_1) = 193.567 N*m
# [area: 1.2 Kegelradstufe]
# 1.2 Kegelradstufe
# 1.2.1 Kegelritzel | 1.2.2 Kegelrad
z_1 := 17
z_2 := 60
d_m1 := 50.985 mm
d_m2 := 179.947 mm
F_tm1 := 7593 N
F_tm2 := 7593 N
F_am1 := 754 N
F_am2 := 2659 N
F_rm1 := 2659 N
F_rm2 := 754 N
F_Z1 := [F_am1; -F_tm1; F_rm1]
F_Z2 := [-F_rm2; F_tm2; -F_am2]
# 1.2.3 Übersetzung der Kegelradstufe
i_12 := -z_2/z_1 = -3.52941
# [area: 1.3 Werkstoffkennwerte]
# 1.3 Werkstoffkennwerte
# Werkstoff der Ritzelwelle: 20MnCr5
τ_tW.Welle1 := 360*N/mm^2
# [area: 1.4 Überschlägiger Wellendurchmesser Welle1]
# 1.4 überschlägiger Wellendurchmesser
# Welle wird nur auf Torison ausgelegt
τ_zul := 40*N/mm^2
d_üb1 := nthroot(16*T_1/(π*τ_zul), 3) = 29.1014 mm
d_Welle1 := 30 mm
# [area: 1.5 Lagerreaktionen Welle 1]
# 1.5 Lagerreaktionen
# 1.5.1 Lagerabstände
e := 50 mm
f := 80 mm
# 1.5.2 Lagerkräfte
# Lager A nimmt Axialkraft auf
F_Bx := 0 N
F_Ax := -F_am1 = -754 N
F_By := F_tm1*f/e
F_Ay := F_tm1 - F_By = -4555.8 N
F_Bz := -(F_am1*d_m1/2 + F_rm1*f)/e
F_Az := -(F_rm1 + F_Bz) = 1979.83 N
F_B := [F_Bx; F_By; F_Bz]
F_A := [F_Ax; F_Ay; F_Az]
F_rB := sqrt(F_By^2 + F_Bz^2) = 13004.3 N
F_rA := sqrt(F_Ay^2 + F_Az^2) = 4967.4 N
F_aB := |F_Bx| = 0 N
F_aA := |F_Ax| = 754 N
# [area: Lebensdauerberechnung Kegelrollenlager Welle 1]
# 1.6 Lebensdauerberechnung Kegelrollenager
p := 10/3
# 1.6.1 gewählte Lagerkombination
# [component: inputs Kurzzeichen_Kegelrollenlager; outputs Auswahl_Kegelrollenlager_A]
C_rA := KegelrollenlagerData[Auswahl_Kegelrollenlager_A + 1, 4]*kN
C_0rA := KegelrollenlagerData[Auswahl_Kegelrollenlager_A + 1, 5]*kN
e_A := KegelrollenlagerData[Auswahl_Kegelrollenlager_A + 1, 6]
Y_A := KegelrollenlagerData[Auswahl_Kegelrollenlager_A + 1, 7]
Y_0A := KegelrollenlagerData[Auswahl_Kegelrollenlager_A + 1, 8]
# [component: inputs Kurzzeichen_Kegelrollenlager; outputs Auswahl_Kegelrollenlager_B]
C_rB := KegelrollenlagerData[Auswahl_Kegelrollenlager_B + 1, 4]*kN
C_0rB := KegelrollenlagerData[Auswahl_Kegelrollenlager_B + 1, 5]*kN
e_B := KegelrollenlagerData[Auswahl_Kegelrollenlager_B + 1, 6]
Y_B := KegelrollenlagerData[Auswahl_Kegelrollenlager_B + 1, 7]
Y_0B := KegelrollenlagerData[Auswahl_Kegelrollenlager_B + 1, 8]
# 1.6.2 Statische Tragzahl
P_0B := F_rB + 2*Y_0B*F_aB
P_0A := F_rA + 2*Y_0A*F_aA
f_sB := C_0rB/P_0B
f_sA := C_0rA/P_0A
# 1.6.3 Lastverhältnisse und äquivalente Last Ka der Lagerkombination
K_aA :=
    (F_aA + 0.5*F_rB/Y_B) if F_rA/Y_A ≤ F_rB/Y_B
    (F_aA + 0.5*F_rB/Y_B) if (F_rA/Y_A > F_rB/Y_B) and (F_aA > 0.5*(F_rA/Y_A - F_rB/Y_B))
    0 if (F_rA/Y_A > F_rB/Y_B) and (F_aA ≤ 0.5*(F_rA/Y_A - F_rB/Y_B))
K_aB :=
    0 if F_rA/Y_A ≤ F_rB/Y_B
    0 if (F_rA/Y_A > F_rB/Y_B) and (F_aA > 0.5*(F_rA/Y_A - F_rB/Y_B))
    (0.5*F_rA/Y_A - F_aA) if (F_rA/Y_A > F_rB/Y_B) and (F_aA ≤ 0.5*(F_rA/Y_A - F_rB/Y_B))
# 1.6.4 X- und Y-Faktoren der Lager
X_B :=
    1 if K_aB/F_rB ≤ e_B
    0.67 otherwise
X_A :=
    1 if K_aA/F_rA ≤ e_A
    0.67 otherwise
Y_B :=
    1.12*Y_B if K_aB/F_rB ≤ e_B
    1.68*Y_B otherwise
Y_A :=
    1.12*Y_A if K_aA/F_rA ≤ e_A
    1.68*Y_A otherwise
P_B := X_B*F_rB + Y_B*K_aB
P_A := X_A*F_rA + Y_A*K_aA
# 1.6.5 Lebensdauer der Lager
L_hnB := 10^6/n_1*(C_rB/P_B)^p = hr
L_hnA := 10^6/n_1*(C_rA/P_A)^p = hr
# 2. Zwischenwelle
# [area: 2.1 Zwischenwelle Kennwerte]
# 2.1 Antriebskennwerte
T_2 := |T_1*i_12| = 683.177 N*m
n_2 := |n_1/i_12| = 419.333 min^-1
# [area: 2.2 Werkstoffkennwerte der Komponenten der Zwischenwelle]
# 2.2 Werkstoffkennwerte der Komponenten der Zwischenwelle
# 2.2.1 Zwischenwelle
# 2.2.2 Kegelrad
# 2.2.3 Passfeder des Kegelrades 2
# 2.2.4 Ritzel 3
σ_FE3 := 460*N/mm^2
σ_Hlim3 := 1630 MPa
E_3 := 2.1*10^5*N/mm^2
ν_3 := 0.3
# 2.2.5 Rad 4
E_4 := 2.1*10^5*N/mm^2
ν_4 := 0.3
# [area: 2.3 Festlegung der Zähnezahlen der Stirnradstufe]
# 2.2 Festlegung der Zähnezahlen der Stirnradstufe
# 2.2.1 Auswahl der Zähnezahlen
i_34_theoretisch := i_ges_theoretisch/i_12 = -2.21
z_3 := 19  # gewählt (zwischen 14 und 20)
z_4.theoretisch := -i_34_theoretisch*z_3 = 41.99
z_4 := 42  # gewählt
# 2.2.2 Tatsächliche Übersetzung der Stirnradstufe
i_34 := -z_4/z_3 = -2.21053
i_ges := i_12*i_34 = 7.80186
# 2.2.3 Abweichung von der geforderten Übersetzung
(i_ges - i_ges_theoretisch)/i_ges_theoretisch*100*% = 0.0238152 %
# [area: 2.4 Festlegung des Normalmoduls der Stirnradstufe]
# 2.4 Festlegung des Normalmoduls der Stirnradstufe
# 2.4.1 Schrägungswinkel
β_34 := 18 °  # gewählt (zwischen 8° und 18°)
# 2.4.2 Breite-Durchmesser-Verhältnis
Ψ_3 := 0.8  # gewählt (kleiner 0,8)
# 2.4.3 Normaleneingriffswinkel
α_n := 20 °  # DIN-Normverzahnung
# 2.4.4 Überschlägiges Normalmodul
m_n34.ueberschlag := 2.5*nthroot(T_2*cos(β_34)^2/(z_3^2*Ψ_3*σ_FE3), 3) = 4.17321 mm
# 2.4.5 Auswahl des Normalmoduls
m_n34 := 5 mm  # ausgewählt aus Normenreihe DIN 780
# [area: 2.5 Festlegung der Breite der Stirnräder]
# 2.5 Festlegung der Breite der Stirnräder
# 2.5.1 Teilkreisdurchmesser der Zahnäder
d_3 := z_3/cos(β_34)*m_n34 = 99.8889 mm
# 2.5.2 Theoretische der Breite des Ritzels
b_3_theoretisch := Ψ_3*d_3 = 79.9111 mm
# 2.5.3 Auswahl der Breite des Ritzels
b_3 := 80 mm
b_3/d_3 = 0.80089
# 2.5.4 Breite des Rades
b_4 := b_3 + 2 mm = 82 mm
# 2.5.4 gemeinsame Zahnbreite
b_w34 := min(b_3, b_4) = 80 mm
# [area: 2.6 Festlegung des Achsabstandes der Stirnradstufe]
# 2.6 Festlegung des Achsabstandes der Stirnradstufe
# 2.6.1 Null-Achsabstand
α_t := atan(tan(α_n)/cos(β_34)) = 20.9419 deg
a_d := z_3*m_n34/(2*cos(β_34))*(z_4/z_3 + 1) = 160.348 mm
# 2.6.2 Auswahl des Achsabstandes
# Sinnvolle Eingrenzung des Achsabstandes
a_min := -0.5*m_n34 + a_d = 157.848 mm
a_max := 1.6*m_n34 + a_d = 168.348 mm
a := 165 mm  # festgelegt
# [area: 2.7  Profilverschiebung der Stirnradstufe festlegen]
# 1.7  Profilverschiebung der Stirnradstufe festlegen
# 1.7.1 Profilverschiebungssumme
α_wt := acos(cos(α_t)*a_d/a) = 24.8226 deg
inv_αwt := tan(α_wt) - α_wt*π/(180 °) = 0.0293076
inv_αt := tan(α_t) - α_t*π/(180 °) = 0.0171959
Profilverschiebungssumme := (inv_αwt - inv_αt)/(2*tan(α_n))*(z_3 + z_4)
Profilverschiebungssumme = 1.01494
# 1.7.2 Aufteilung der Profilverschiebung
# Grundkreisschrägungswinkel
β_b := asin(sin(β_34)*cos(α_n)) = 16.8808 deg
# Ersatzzähnezahlen
z_n3 := z_3/(cos(β_b)^2*cos(β_34)) = 21.8175
z_n4 := z_4/(cos(β_b)^2*cos(β_34)) = 48.2281
# Auswahl der Profilverschiebung
(z_n3 + z_n4)/2 = 35.0228
Profilverschiebungssumme/2 = 0.507469
x_3 := 0.5
x_4 := Profilverschiebungssumme - x_3
x_4 = 0.514937
# [area: 2.8 Geometrische Größen der Stirnradstufe]
# 2.8 Geometrische Größen der Stirnradstufe
# 2.8.1 Zähnezahlverhältnis
u_34 := z_4/z_3 = 2.21053
# 2.8.2 Kopfhöhenänderungsfaktor
k := (a - a_d)/m_n34 - Profilverschiebungssumme = -0.0845349
# 2.8.3 Zahnraddurchmesser
d_4 := z_4/cos(β_34)*m_n34 = 220.807 mm
d_3 = 99.8889 mm
d_a3 := d_3 + 2*m_n34*(1 + x_3 + k) = 114.044 mm
d_a4 := d_4 + 2*m_n34*(1 + x_4 + k) = 235.111 mm
d_b3 := d_3*cos(α_t) = 93.2906 mm
d_b4 := d_4*cos(α_t) = 206.221 mm
d_f3 := d_3 - 2*m_n34*(1 + 0.25 - x_3) = 92.3889 mm
d_f4 := d_4 - 2*m_n34*(1 + 0.25 - x_4) = 213.456 mm
d_w3 := (2*a)/(z_4/z_3 + 1) = 102.787 mm
d_w4 := 2*a - d_w3 = 227.213 mm
# 2.8.4 Stirneingriffsteilung
p_et := m_n34*π*cos(α_t)/cos(β_34) = 15.4253 mm
# 2.8.5 Überdeckung
# Profilüberdeckung
ε_α := 1/p_et*(sqrt((d_a3/2)^2 - (d_b3/2)^2) + sqrt((d_a4/2)^2 - (d_b4/2)^2) - a*sin(α_wt)) = 1.29573
# Sprungüberdeckung
ε_β := b_w34*sin(β_34)/(m_n34*π) = 1.57381
# Gesamtüberdeckung
ε_γ := ε_α + ε_β = 2.86954
# 2.8.6 Virtuelle Zähnezahlen
z_v3 := z_3/cos(β_34)^3 = 22.0869
z_v4 := z_4/cos(β_34)^3 = 48.8237
# 2.8.7 Eingriffsstrecke
g_α := 1/2*(sqrt(d_a3^2 - d_b3^2) + z_4/|z_4|*sqrt(d_a4^2 - d_b4^2)) - a_d*sin(α_n) = 34.4136 mm
# [area: 2.9 Prüfung der Messbedingungen]
# 2.9 Prüfung der Messbedingungen
# 2.9.1 Messzähnezahlen
k_M4_theoretisch := z_4/(9*cos(β_34)^3) + 0.5 = 5.92485
k_M3_theoretisch := z_3/(9*cos(β_34)^3) + 0.5 = 2.9541
k_M4 := ceil(k_M4_theoretisch) = 6
k_M3 := ceil(k_M3_theoretisch) = 3
# 2.9.2 Zahnweite
W_k3 := m_n34*cos(α_n)*((k_M3 - z_3/(2*|z_3|))*π + z_3*inv_αt) + 2*x_3*m_n34*sin(α_n) = 40.1468 mm
W_k4 := m_n34*cos(α_n)*((k_M4 - z_4/(2*|z_4|))*π + z_4*inv_αt) + 2*x_4*m_n34*sin(α_n) = 86.3382 mm
# 2.9.3 Prüfung Bedingung 1
"erfüllt" if W_k3*sin(|β_b|) < b_3
"nicht erfüllt" otherwise
= "erfüllt"
"erfüllt" if W_k4*sin(|β_b|) < b_4
"nicht erfüllt" otherwise
= "erfüllt"
# 2.9.4 Prüfung Bedingung 2
c_Zahnrad := m_n34*0.25
"erfüllt" if (d_f3 + 2*c_Zahnrad) < sqrt((W_k3/cos(β_b))^2 + d_b3^2) < d_a3
"nicht erfüllt" otherwise
= "erfüllt"
"erfüllt" if (d_f4 + 2*c_Zahnrad) < sqrt((W_k4/cos(β_b))^2 + d_b4^2) < d_a4
"nicht erfüllt" otherwise
= "erfüllt"
# [area: 2.10 Zahnkräfte Stirnradstufe]
# 2.10 Zahnkräfte der Stirnradstufe
# 2.10.1 Tangentialkräfte
F_t3 := 2*T_2/d_3 = 13678.7 N
F_t4 := F_t3 = 13678.7 N
# 2.10.2 Radialkräfte
F_r3 := F_t3*tan(α_t) = 5234.87 N
F_r4 := F_r3 = 5234.87 N
# 2.10.3 Axialkräfte
F_a3 := F_t3*tan(β_34) = 4444.49 N
F_a4 := F_a3 = 4444.49 N
# 2.10.4 Zahnkräfte in Vektorschreibweise
F_Z3 := [-F_r3; F_t3; -F_a3]
F_Z4 := [F_r4; -F_t4; F_a4]
# [area: 2.11 Y-Faktoren der Zahnradstufe]
# 2.11 Y-Faktoren der Zahnradstufe
# 2.11.1 Formfaktor YFa
z_n3 = 21.8175
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x_3 = 0.5
Y_Fa3 := 2.21
# 2.11.2 Spannungskorrekturfaktor YSa
z_n3 = 21.8175
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x_3 = 0.5
Y_Sa3 := 1.94
# 2.11.3 Überdeckungsfaktor Yε
ε_an := ε_α/cos(β_b)^2
Y_ε := 0.25 + 0.75/ε_an = 0.780016
# 2.11.4 Schrägungsfaktor Yβ
Y_βmin := 1 - 0.25*ε_β = 0.606547
Y_β :=
    (1 - 1*β_34/(120 °)) if ε_β > 1
    (1 - ε_β*β_34/(120 °)) otherwise
    = 0.85
# 2.11.5 Relative Stützziffer Yδ
ρ_F3 := 0.25*m_n34
s_Fn := m_n34*π/2 = 7.85398 mm
q_s3 := s_Fn/(2*ρ_F3) = 3.14159
Y_δ3 :=
    1 if q_s3 ≥ 1.5
    0.95 otherwise
    = 1
# 2.11.6 Relativer Oberflächenfaktor
R_z3 := 10 μm
Y_R3 :=
    1 if R_z3 ≤ 16 μm
    0.9 otherwise
    = 1
# 2.11.7 Größenfaktor
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Y_X := 1
# [area: 2.12 K-Faktoren der Zahnradstufe]
# 2.12 K-Faktoren des Ritzels
# 2.12.1 Dynamikfaktor KV
# Umfangsgeschwindigkeit am Wälzkreis
v_3 := π*n_2*d_w3 = 2.25681 m/s
# Linienbelastung je mm Zahnbreite
p_L :=
    100*N/mm if K_A*F_t3/b_w34 < 100*N/mm
    K_A*F_t3/b_w34 otherwise
    = 256.476 N/mm
# Faktoren K1, K2, K3
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K_1 := 13.6  # (IT 7)
K_2 := 0.0087
K_3 := 0.01*z_3*v_3*sqrt(u_34^2/(u_34^2 + 1)) = 0.390678 m/s
# Dynamikfaktor
K_V := 1 + (K_1/(p_L*mm/N) + K_2)*K_3*s/m = 1.02412
# 2.12.2 Breitenfaktor der Flanke KHβ
# Mittlere Linienbelastung
F_m3 := K_A*K_V*F_t3 = 21012.9 N
p_mL :=
    100*N/mm if F_m3/b_w34 < 100*N/mm
    F_m3/b_w34 otherwise
    = 262.661 N/mm
# zulässige Flankenlinien-Winkelabweichung
b_3 = 80 mm
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f_Hβ := 14 μm
# herstellungsbedingte Flankenlinienabweichung
c_ma := 1
f_ma := c_ma*f_Hβ = 14 μm
# Flankenlinienabweichung durch Verformung
b_w34 = 80 mm
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F_t3/b_w34 = 170.984 N/mm
f_sh := 7 μm
# Wirksame Flankenlinienabweichung vor dem Einlaufen
F_βx := f_ma + 1.33*f_sh = 23.31 μm
# Einlaufbetrag
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y_β := 0.15*F_βx = 3.4965 μm
# Wirksame Flankenlinienabweichung nach dem Einlaufen
F_βy := F_βx - y_β = 19.8135 μm
# Eingriffsfedersteifigkeit
c_γ := 20*N/(mm*μm)
# Breitenfaktor der Flanke
K_Hβ :=
    1 + c_γ*F_βy/(2*K_A*K_V*F_t3/b_3) if c_γ*F_βy/(2*K_A*K_V*F_t3/b_3) < 1
    sqrt(c_γ*F_βy/(2*K_A*K_V*F_t3/b_3)) otherwise
    = 1.75434
# 2.12.3 Breitenfaktor des Fußes KFβ
# Zahnhöhe des Ritzels
h_3 := (d_a3 - d_f3)/2 = 10.8273 mm
# Exponent
N_F := (b_3/h_3)^2/(1 + b_3/h_3 + (b_3/h_3)^2) = 0.866807
# Breitenfaktor des Fußes
K_Fβ := K_Hβ^N_F = 1.62779
# 2.12.4 Stirnfaktor des Fußes
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F_t3/b_w34*K_A = 256.476 N/mm
K_Fα := 1.1
# 2.12.5 Stirnfaktor der Flanke
K_Hα := K_Fα
# 2.12.6 Gesamtbelastungseinfluss
# für die Zahnfußtragfähigkeit
K_F_ges := K_A*K_V*K_Fα*K_Fβ = 2.75063
# für die Grübchentragfähigkeit
K_H_ges := sqrt(K_A*K_V*K_Hα*K_Hβ) = 1.72176
# [area: 2.13 Z-Faktoren der Zahnradstufe]
# 2.13 Z-Faktoren der Zahnradstufe
# 2.13.1 Größenfaktor, Werkstofffaktor, Geschwindigkeitsfaktor, Rauheitsfaktor, Schmierstofffaktor
# im Dauerfestigkeitsbereich ist das Produkt dieser Faktoren = 1
Z_N := 1  # im Dauerfestigkeitsbereich
# 2.13.2 Elastizitätsfaktor
Z_E := sqrt(0.35*1/(1/E_3 + 1/E_4)) = 191.703 sqrt(N/mm^2)  # für Stähle
# 2.13.3 Zonenfaktor
Z_H := sqrt(2*cos(β_b)/(cos(α_t)^2*tan(α_wt))) = 2.17798
# 2.13.4 Überdeckungsfaktor
Z_ε :=
    sqrt(1/ε_α) if ε_β ≥ 1
    sqrt((4 - ε_α)*(1 - ε_β)/3 + ε_β/ε_α) otherwise
    = 0.878501
# 2.3.3.5 Schrägenfaktor
Z_β := sqrt(cos(β_34)) = 0.975221
# [area: 2.14 Sicherheitsberechnung des Ritzels]
# 2.14 Sicherheitsberechnung des Ritzels
# 2.14.1 Beanspruchung des Ritzels
# Örtliche Zahnfußspannung
σ_F0 := F_t3/(b_3*m_n34)*Y_Fa3*Y_Sa3*Y_ε*Y_β = 97.2081 N/mm^2
σ_F := σ_F0*K_F_ges = 267.383 N/mm^2
# Flankenpressung
σ_H0 := Z_E*Z_H*Z_ε*Z_β*sqrt(F_t3/(b_3*d_3)*(u_34 + 1)/u_34) = 564.011 N/mm^2
σ_H := σ_H0*K_H_ges = 971.092 N/mm^2
# 2.14.2 Beanspruchbarkeit des Ritzels
# Zahnfußgrenzfestigkeit
σ_FG3 := σ_FE3*Y_δ3*Y_R3*Y_X = 460 N/mm^2
σ_HG3 := σ_Hlim3*Z_N = 1630 N/mm^2
# 2.14.3 Sicherheit Zahnfußtragfähigkeit
S_F3 := σ_FG3/σ_F = 1.72038
# 2.14.4 Sicherheit gegen Grübchenbildung
S_H3 := σ_HG3/σ_H = 1.67852
# [area: Berechnung der Lagerkräfte]
# 3.1.3 Kräfte Stirnrad 3
F_tm3 := F_t3 = 13678.7 N
F_am3 := F_a3 = 4444.49 N
F_rm3 := F_r3 = 5234.87 N
# 3.1.4 Kräfte Stirnrad 4
F_tm4 := F_t4 = 13678.7 N
F_am4 := F_a4 = 4444.49 N
F_rm4 := F_r4 = 5234.87 N
# 3.1 Festlegung der Abstände
L := b + c + d
# 3.2  Antriebswelle | 3.3  Zwischenwelle | 3.4  Abtriebswelle
# 3.3.2 Lager D (Loslager) | 3.4.1 Lager F (Loslager)
F_Fx := (F_a4*d_4/2 - F_r4*b)/L
F_Dx := (F_r3*c + F_r3*d + F_rm2*d - F_a3*d_3/2 + F_am2*d_m2/2)/L
F_Fy := F_t4*b/L
F_Dy := -(F_tm2*c*d_m2/2 + F_tm2*d*d_3/2 + F_tm2*d*d_m2/2)/(L*d_3/2)
F_Fz := 0 N
F_F := [F_Fx; F_Fy; F_Fz]
F_Dz := 0 N
F_Fr := sqrt(F_Fx^2 + F_Fy^2)
F_Fa := |F_Fz| = 0 N
F_D := [F_Dx; F_Dy; F_Dz]
F_Dr := sqrt(F_Dx^2 + F_Dy^2)
F_Da := |F_Dz| = 0 N
# 3.4.2 Lager E (Festlager)
# 3.3.2 Lager C (Festlager)
F_Ex := -(F_r4 + F_Fx)
F_Cx := F_r3 - F_Dx + F_rm2
F_Ey := F_t4 - F_Fy
F_Cy := -F_t3 - F_Dy - F_tm2
F_Ez := -F_a4
F_E := [F_Ex; F_Ey; F_Ez]
F_Cz := F_a3 + F_am2 = 7103.49 N
F_Er := sqrt(F_Ex^2 + F_Ey^2)
F_Cr := sqrt(F_Cx^2 + F_Cy^2)
F_C := [F_Cx; F_Cy; F_Cz]
F_Ea := |F_Ez| = 4444.49 N
F_Ca := |F_Cz| = 7103.49 N
F_A = [-754; -4555.8; 1979.83] N
F_C =  # error: Diese Variable ist nicht definiert.
F_E =  # error
F_B = [0; 12148.8; -4638.83] N
F_D =  # error
F_F =  # error
# [area: Berechnung der Schnittreaktionen]
# 4.2 Zwischenwelle | 4.3 Abtriebswelle
# 4.1 Antriebswelle
F_E := [F_Ex; F_Ey; F_Ez]
F_F := [F_Fx; F_Fy; F_Fz]
M_ab := [0; 0; T_3]
F_A := [F_Ax; F_Ay; F_Az]
r_X(s_1) := [-s_1; 0; 0]
r_BA := [-e; 0; 0]
M_an := [T_1; 0; 0]
F_D := [F_Dx; F_Dy; F_Dz]
F_C := [F_Cx; F_Cy; F_Cz]
M_Schnitt3(s_3) :=
    [0; 0; 0] if s_3 < 0
    [0; 0; s_3]×F_E + M_ab if 0 ≤ s_3 < b
    [0; 0; s_3]×F_E + M_ab + [-d_4/2; 0; s_3 - b]×F_Z4 if b ≤ s_3 ≤ L
F_B := [F_Bx; F_By; F_Bz]
M_Schnitt2(s_2) :=
    [0; 0; 0] if s_2 < 0
    [0; 0; s_2]×F_D if 0 ≤ s_2 < b
    [0; 0; s_2]×F_D + [d_3/2; 0; s_2 - b]×F_Z3 if b ≤ s_2 < b + c
    [0; 0; s_2]×F_D + [d_3/2; 0; s_2 - b]×F_Z3 + [-d_m2/2; 0; s_2 - (b + c)]×F_Z2 if b + c ≤ s_2 ≤ L
M_Schnitt1(s_1) :=
    [0; 0; 0] if s_1 < 0
    [-s_1; 0; 0]×F_A + M_an if 0 ≤ s_1 < e
    [-s_1; 0; 0]×F_A + [-s_1 + e; 0; 0]×F_B + M_an if e ≤ s_1 ≤ f
M_Bres3(s_3) := sqrt(M_Schnitt3(s_3)[0]^2 + M_Schnitt3(s_3)[1]^2)
M_T3(s_3) := M_Schnitt3(s_3)[2]
M_Bres1(s_1) := sqrt(M_Schnitt1(s_1)[1]^2 + M_Schnitt1(s_1)[2]^2)
M_T1(s_1) := M_Schnitt1(s_1)[0]
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M_T2(s_2) := M_Schnitt2(s_2)[2]
M_Bres2(s_2) := sqrt(M_Schnitt2(s_2)[0]^2 + M_Schnitt2(s_2)[1]^2)
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M_Bmax3 := M_Bres3(b - 0.0001 mm)
M_Bmax1 := M_Bres1(e) = 248.37 N*m
T_max1 := M_T1(e) = 193.567 N*m
M_Bmax2 := max(M_Bres2(b), M_Bres2(b + c))
T_max2 := M_T2(b)
M_Bmax1 = 248.37 N*m
M_Bmax2 =  # error
M_Bmax3 =  # error
T_1 = 193.567 N*m
T_2 = 683.177 N*m
T_3 =  # error
# [area: Überschlägiger Wellendurchmesser]
# 5.1 Antriebswelle
σ_Vüb := 50*N/mm^2
M_V1(M_B, T) := sqrt(M_B^2 + 3/4*T^2)
d_üb(M_B, T) := nthroot(32*M_V1(M_B, T)/(π*σ_Vüb), 3)
d_üb1 := d_üb(M_Bmax1, T_1) = 39.3744 mm
d_üb2 := d_üb(M_Bmax2, T_2)
d_üb3 := d_üb(M_Bmax3, T_3)
d_üb1 = 39.3744 mm
d_üb2 =  # error
d_üb3 =  # error
d_W1 := 40 mm
d_W2 := 64 mm
d_W3 := 70 mm
# [area: Lager Lebensdauerberechnung]
# 6.3 Lager C (Festlager)
F_Cr =  # error
F_Ca = 7103.49 N
# 6.3.1 Informationen über gewähltes Lager C
i := 1  # Anzahl gleichartiger einreihiger Lager unmittelbar nebeneinander angeordnet
C_C := 128*1000*N  # Tragzahlen
C_0C := 106*1000*N
p := 3
# 6.3.2 Statische Tragzahl
X_0C := 0.6
Y_0C := 0.5
P_0C := X_0C*F_Cr + Y_0C*F_Ca
f_sC := C_0C/P_0C
# 6.3.1 X- und Y-Faktoren für Lager C
Θ_min := 0.084
e_min := 0.28
Y_min := 1.45
# relative Axiallast:
Θ_C := 0.093
Θ_max := 0.11
e_max := 0.3
Y_max := 1.31
# Interpolation e
e_C := e_min + ((e_max - e_min)/(Θ_max - Θ_min))*(Θ_C - Θ_min) = 0.286923
Y :=
    0 if F_Ca/F_Cr ≤ Θ_C
    Y_min + ((Y_max - Y_min)/(Θ_max - Θ_min))*(Θ_C - Θ_min) otherwise
X :=
    1 if F_Ca/F_Cr ≤ Θ_C
    0.56 otherwise
# 6.3.2 Dynamisch Äquivalente Belastung
P_C := X*F_Cr + Y*F_Ca
# 6.3.2 Lebensdauer
L_hnC := 10^6/n_2*(C_C/P_C)^p = hr
# 6.4 Lager D (Loslager)
F_Dr =  # error
F_Da = 0 N
# 6.4.1 Informationen über gewähltes Lager D
i := 1  # Anzahl gleichartiger einreihiger Lager unmittelbar nebeneinander angeordnet
C_D := 76.5*1000*N  # Tragzahlen
C_0D := 47.5*1000*N
p := 3
# 6.4.2 Statische Tragzahl
X_0D := 0.6
Y_0D := 0.5
P_0D := X_0D*F_Dr + Y_0D*F_Da
f_sD := C_0D/P_0D
# 6.3.1 X- und Y-Faktoren für Lager D
Θ_min := 0.11
e_min := 0.3
Y_min := 1.45
# relative Axiallast:
Θ_D := F_Da/(C_0D*i) = 0
Θ_max := 0.17
e_max := 0.34
Y_max := 1.31
# Interpolation e
e_D := e_min + ((e_max - e_min)/(Θ_max - Θ_min))*(Θ_D - Θ_min) = 0.226667
Y :=
    0 if F_Da/F_Dr ≤ Θ_D
    Y_min + ((Y_max - Y_min)/(Θ_max - Θ_min))*(Θ_D - Θ_min) otherwise
X :=
    1 if F_Da/F_Dr ≤ Θ_D
    0.56 otherwise
# 6.3.2 Dynamisch Äquivalente Belastung
P_D := X*F_Dr + Y*F_Da
# 6.3.2 Lebensdauer
L_hnD := 10^6/n_2*(C_D/P_D)^p = hr
# 6.4 Lager E (Festlager)
F_Er =  # error
F_Ea = 4444.49 N
# 6.4.1 Informationen über gewähltes Lager E
i := 1  # Anzahl gleichartiger einreihiger Lager unmittelbar nebeneinander angeordnet
C_E := 76.5*1000*N  # Tragzahlen
C_0E := 47.5*1000*N
p := 3
# 6.4.2 Statische Tragzahl
X_0E := 0.6
Y_0E := 0.5
P_0E := X_0E*F_Er + Y_0E*F_Ea
f_sE := C_0E/P_0E
# 6.3.1 X- und Y-Faktoren für Lager E
Θ_min := 0.084
e_min := 0.28
Y_min := 1.55
# relative Axiallast:
Θ_E := F_Ea/(C_0E*i) = 0.0935682
Θ_max := 0.11
e_max := 0.3
Y_max := 1.45
# Interpolation e
e_E := e_min + ((e_max - e_min)/(Θ_max - Θ_min))*(Θ_E - Θ_min) = 0.28736
Y :=
    0 if F_Ea/F_Er ≤ Θ_E
    Y_min + ((Y_max - Y_min)/(Θ_max - Θ_min))*(Θ_E - Θ_min) otherwise
X :=
    1 if F_Ea/F_Er ≤ Θ_E
    0.56 otherwise
# 6.3.2 Dynamisch Äquivalente Belastung
P_E := X*F_Er + Y*F_Ea
# 6.3.2 Lebensdauer
L_hnE := 10^6/n_3*(C_E/P_E)^p = hr
# 6.4 Lager F (Loslager)
F_Fr =  # error
F_Fa = 0 N
# 6.4.1 Informationen über gewähltes Lager E
i := 1  # Anzahl gleichartiger einreihiger Lager unmittelbar nebeneinander angeordnet
C_F := 29*1000*N  # Tragzahlen
C_0F := 23.2*1000*N
p := 3
# 6.4.2 Statische Tragzahl
X_0F := 0.6
Y_0F := 0.5
P_0F := X_0F*F_Fr + Y_0F*F_Fa
f_sF := C_0F/P_0F
# 6.3.1 X- und Y-Faktoren für Lager F
Θ_min := 0.11
e_min := 0.3
Y_min := 1.45
# relative Axiallast:
Θ_F := F_Fa/(C_0F*i) = 0
Θ_max := 0.17
e_max := 0.34
Y_max := 1.31
# Interpolation e
e_F := e_min + ((e_max - e_min)/(Θ_max - Θ_min))*(Θ_F - Θ_min) = 0.226667
Y :=
    0 if F_Fa/F_Fr ≤ Θ_D
    Y_min + ((Y_max - Y_min)/(Θ_max - Θ_min))*(Θ_F - Θ_min) otherwise
X :=
    1 if F_Fa/F_Fr ≤ Θ_D
    0.56 otherwise
# 6.3.2 Dynamisch Äquivalente Belastung
P_F := X*F_Fr + Y*F_Fa
# 6.3.2 Lebensdauer
L_hnF := 10^6/n_3*(C_F/P_F)^p = hr
L_hnA = hr
L_hnC = hr
L_hnE = hr
L_hnB = hr
L_hnD = hr
L_hnF = hr
# [area: Welle-NabeVerbindungen]
# 7.2 Passfeder Kegelrad 2
# 7.2.1 Belastung | 4.1.2 Daten der ausgewählten Passfeder | Passfederverbindung nach DIN 6885
S_F := 1.5
T_2 = 683.177 N*m
b := 18 mm
t_1 := 7 mm
φ := 0.5
L_1 := 14 mm
d_F := d_W2 = 64 mm
hr := 11 mm
t_2 := 4.4 mm
l_N := L_1 - b = -4 mm
# 7.2.2 erforderliche Passfederlänge
σ_SPassfeder := 395 MPa
σ_SZahnrad := 696 MPa
σ_SWelle := 590 MPa
l_tr.theoretisch := 2*T_2*S_F/(d_F*(hr - t_1)*σ_SPassfeder*φ) = 40.5366 mm
L_tr.gew := 42 mm
L_PF2 := L_tr.gew + b = 60 mm
L_tr.gew/d_W2 = 0.65625
# 7.2 Pressverband Zahnrad 3
# 7.2.1 Geometrische Daten des Pressverbandes
d_F := d_W2 = 64 mm
d_Aa := d_3 = 99.8889 mm
R_ZI := 3.2*μm
R_ZA := 6.3 μm
μ := 0.14
l_F := 72 mm
S_R := 1.1
S_F := 1.3
# 7.2.2 zu übertragende Kraft und dafür notwendige Fugenpressung
F := sqrt((2*T_2/d_F)^2 + F_a3^2) = 21807 N
p_erf := S_R*F/(π*d_F*l_F*μ) = 11.8358 MPa
# 7.2.3 Zulässige Fugenpressung aus Werkstoffdaten
E := 2.1*10^5*MPa
# a) Welle | b) Nabe
σ_SI := 590 MPa
σ_SA := 695 MPa
Q_A := d_F/d_Aa
p_GI := σ_SI/S_F = 453.846 MPa
p_GA := (1 - Q_A^2)/sqrt(3 + Q_A^4)*σ_SA/S_F = 177.047 MPa
p_zul := min(p_GI, p_GA) = 177.047 MPa
# 7.2.4 Erforderliche Übermaße um erforderliche Pressung zu gewährleisten und zulässige Presssung nicht zu überschreiten
# Mindesthaftmaß | Größthaftmaß
Z_min := p_erf*d_F/E*2/(1 - Q_A^2) = 12.2381 μm
Z_max := p_zul*d_F/E*2/(1 - Q_A^2) = 183.064 μm
# Mindestübermaß | Größtübermaß
ΔU_min := 0.8*(R_ZI + R_ZA) = 7.6 μm
ΔU_max := 0.8*(R_ZI + R_ZA) = 7.6 μm
U_max := Z_max + ΔU_max = 190.664 μm
U_min := Z_min + ΔU_min = 19.8381 μm
# 7.2.5 Passung auswählen
ES := 30 μm
# Bohrung: H7
d_F = 64 mm
EI := 0 μm
es := 83 μm
# Welle: s6
d_F = 64 mm
ei := 53 μm
# 7.2.6 Tatsächliche Übermaße und Haftmaße
U_K := ei - ES = 23 μm
U_G := es - EI = 83 μm
Z_K := U_K - ΔU_min = 15.4 μm
Z_G := U_G - ΔU_max = 75.4 μm
# 7.2.6 Tatsächlich auftretende Fugenpressung
p_K := Z_K*(1 - Q_A^2)*E/(2*d_F) = 14.8938 MPa
p_G := Z_G*(1 - Q_A^2)*E/(2*d_F) = 72.9216 MPa
# 7.2.7 Auftretende Sicherheit gegen Rutschen
S_RK := p_K*π*d_F*l_F*μ/F = 1.3842
S_RG := p_G*π*d_F*l_F*μ/F = 6.7772
# 7.2.8 Auftretende Sicherheit gegen plastische Verformung
S_FNabemax := (1 - Q_A^2)/sqrt(3 + Q_A^4)*σ_SA/p_K = 15.4535
S_FWellemax := σ_SI/p_K = 39.6138
# Welle: | Nabe:
S_FWellemin := σ_SI/p_G = 8.09089
S_FNabemin := (1 - Q_A^2)/sqrt(3 + Q_A^4)*σ_SA/p_G = 3.15628
# 7.2.9 Fügespiel
ΔF := d_F/1000 = 0.064 mm
# 7.2.9 Fügetemperatur
t_R := 25 °C
α_Nabe := 11*10^-6/K
t_F := t_R + (U_G + ΔF)/(α_Nabe*d_F) = 233.807 °C
# 7.3 Passfeder Zahnrad 4
# 7.2.1 Belastung
T_3 =  # error
b := 20 mm
t_1 := 7.5 mm
φ := 0.5
S_F := 1.5
d_F := d_W3 = 70 mm
hr := 12 mm
t_2 := 4.9 mm
# 7.2.2 erforderliche Passfederlänge
σ_SPassfeder := 490 MPa
σ_SZahnrad := 695 MPa
σ_SWelle := 590 MPa
l_tr.theoretisch := 2*T_3*S_F/(d_F*(hr - t_1)*σ_SPassfeder*φ)
L_tr.gew := 59 mm
L_PF2 := L_tr.gew + b = 79 mm
L_tr.gew/d_W2 = 0.921875
